*Heading
** Job name: fea-lab-with-hole Model name: fea-lab-with-hole
** Generated by: Abaqus/CAE 2023
*Preprint, echo=NO, model=NO, history=NO, contact=NO
**
** PARTS
**
*Part, name=Part-1
*End Part
**
**
** ASSEMBLY
**
*Assembly, name=Assembly
**
*Instance, name=Part-1-1, part=Part-1
*Node
      1,  0.200000003,  0.166199997
      2,  0.200000003,  0.300000012
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*Element, type=DC2D4
  1,   1,  12, 219,  73
  2,  12,  13, 220, 219
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*Nset, nset=Set-1, generate
    1,  1163,     1
*Elset, elset=Set-1, generate
    1,  1083,     1
** Section: Section-1
*Solid Section, elset=Set-1, material=Mat1
,
*End Instance
**
*Nset, nset=Set-1, instance=Part-1-1
   2,   3,   6,  24,  25,  26
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*Elset, elset=Set-1, instance=Part-1-1
  13,  26,  39,  52,  65,  78
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*Elset, elset=_Surf-1_S3, internal, instance=Part-1-1, generate
 508,  520,    1
*Elset, elset=_Surf-1_S2, internal, instance=Part-1-1, generate
 923,  993,   10
*Elset, elset=_Surf-1_S1, internal, instance=Part-1-1, generate
  994,  1002,     1
*Surface, type=ELEMENT, name=Surf-1
_Surf-1_S3, S3
_Surf-1_S2, S2
_Surf-1_S1, S1
*Elset, elset=_Surf-2_S3, internal, instance=Part-1-1, generate
 248,  260,    1
*Elset, elset=_Surf-2_S2, internal, instance=Part-1-1, generate
 621,  709,   11
*Elset, elset=_Surf-2_S1, internal, instance=Part-1-1, generate
 710,  717,    1
*Surface, type=ELEMENT, name=Surf-2
_Surf-2_S3, S3
_Surf-2_S2, S2
_Surf-2_S1, S1
*End Assembly
**
** MATERIALS
**
*Material, name=Mat1
*Conductivity
15.,
*Density
2000.,
*Specific Heat
150.,
** ----------------------------------------------------------------
**
** STEP: Step-1
**
*Step, name=Step-1, nlgeom=NO
*Heat Transfer, steady state, deltmx=0.
1., 1., 1e-05, 1.,
**
** BOUNDARY CONDITIONS
**
** Name: BC-1 Type: Temperature
*Boundary
Set-1, 11, 11, 140.
**
** LOADS
**
** Name: Load-1   Type: Surface heat flux
*Dsflux
Surf-2, S, 3000.
**
** INTERACTIONS
**
** Interaction: Right edge
*Sfilm
Surf-1, F, 20., 5.
**
** OUTPUT REQUESTS
**
*Restart, write, frequency=0
**
** FIELD OUTPUT: F-Output-1
**
*Output, field, variable=PRESELECT
*Output, history, frequency=0
*End Step
